// COMSOL Multiphysics 6.3.0.290 model "Untitled.mph"
// Outline of the model tree

Parameters
  m = me_const[1/kg]/e_const[1/C]  // Electron mass (eV/c^2)
  hbar = hbar_const[1/(J*s)]/e_const[1/C]  // Reduced Planck constant (eV*s)
  V_In = 0  // Potential barrier, InAs (eV)
  V_Ga = 0.697  // Potential barrier, GaAs (eV)
  c_In = hbar^2/(2*0.023*m)  // c coefficient, InAs
  c_Ga = hbar^2/(2*0.067*m)  // c coefficient, GaAs

Geometry
  geom1 "Geometry 1" (2D axisymmetric, length unit nm)
    r1: Rectangle | size = {25, 100}; base = center; pos = {12.5, 0}
    r2: Rectangle | size = {25, 2}; base = center; pos = {12.5, 0}
    pol1: Polygon | source = table; table = {{0, 0}, {12, 0}, {0, 3.6}}
    co1: Compose | input = pol1, r2; formula = r2+pol1
    co2: Compose | input = co1, r1; formula = r1+co1
    fin: Finalize "Form Union"

Physics
  c: CoefficientFormPDE on all domains
    dependent variable u
    EquationForm.form = Automatic
    cfeq1: CoefficientFormPDE (default) | c = {c_Ga, 0, 0, c_Ga}; a = c_Ga*(l/r)^2+V_Ga; f = 1; da = 1; be = {-c_Ga/r, 0}
    zflx1: ZeroFluxBoundary "Zero Flux 1" (default)
    init1: init "Initial Values 1" (default)
    dir1: DirichletBoundary "Dirichlet Boundary Condition 1" on all boundaries | r = 0

Mesh
  mesh1 "Mesh 1" (physics-controlled)

Studies
  std1 "Study 1"
    eigv: Eigenvalue

Solver configurations
  sol1 "Solution 1" (study std1)
    v1: Variables "Dependent Variables 1"
    e1: Eigenvalue "Eigenvalue Solver 1"
      dDef: Direct

Datasets
  dset1: Solution | solution = sol1